# Bearing Sizing
# Spindle Characteristics
F_feed_z := 400 N
F_cut_x := 90 N
F_cut_y := 100 N
N_rot := 1000 rpm
# Bearing Parameters (LM11949 - LM11910, Tapered Roller Bearings)
# ISO factors
e := 0.30
Y_2 := 2
# Dynamic Radial Rating (1 million revolutions)
C_1 := 39100 N
# Static Radial Rating
C_0 := 32000 N
# Dynamic Thrust Rating (90 million revolutions)
C_a90 := 5220 N
# Bearing Forces
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# Preload
F_preload := 1000 N
# Radial Loads | Axial Load
F_r := sqrt(F_cut_x^2 + F_cut_y^2) = 134.536 N
F_a := F_preload + F_feed_z = 1400 N
# Dynamic Equivalent Radial Load
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P_r :=
    if F_a/F_r ≤ e
        F_r
    else
        0.4*F_r + Y_2*F_a
# Bearing Life
# Preload
L_10 := (C_1/P_r)^(10/3)*(10^6/(60*N_rot)) = 272.074 hr
