# Spindle Calculations
# Assumptions:
# - Fixed Bearings
# - Perfect Turning about Z
pi := 3.14159
# Applied Forces
F_cut_x := 1 N
F_cut_y := 1 N
F_feed_z := 1 N
F_belt := 1 N
# Part Dimensions (The thing getting cut)
D_part := 5 cm
L_part := 10 cm  # L_part is the length of the part from the end of the chuck
# Spindle Shaft Dimensions
R_spindle_ab := 1 cm
L_ab := 1 cm
L_ac := 2 cm
L_ad := 3 cm
L_ag := 4 cm
R_spindle_be := 1 cm
R_spindle_ef := 1 cm
R_spindle_fg := 1 cm
# Material Properties - 12L14
E := 200 GPa
E_part := 70 GPa
G := 2 GPa
G_part := 2 GPa
# Force Balance Calculations
Igp := pi*D_part^4/64
Jgp := pi*D_part^4/32
Agp := pi*D_part^2/2
Rz_gp := [
    1, -(F_cut_y*D_part/2*L_part/(Jgp*G)), 0, 0;
    F_cut_y*D_part/2*L_part/(Jgp*G), 1, 0, 0;
    0, 0, 1, 0;
    0, 0, 0, 1
]
Tz_gp := [1, 0, 0, 0; 0, 1, 0, 0; 0, 0, 1, -F_feed_z*L_part/(E_part*Agp); 0, 0, 0, 1]
Ty_gp := [1, 0, 0, 0; 0, 1, 0, F_cut_x*L_part^3/(3*E_part*Igp); 0, 0, 1, 0; 0, 0, 0, 1]
Tx_gp := [1, 0, 0, F_cut_y*L_part^3/(3*E_part*Igp); 0, 1, 0, 0; 0, 0, 1, 0; 0, 0, 0, 1]
Hgp := Tx_gp*Ty_gp*Tz_gp*Rz_gp  # error: The matrix element units are not compatible with this operation.
